// SBML level 3 version 2
// Created with https://github.com/matthiaskoenig/sbmlutils.

model dapagliflozin_intestine(PODOSE_dap, Ka_dis_dap, Mr_dap, Vext, Vgu, Vlumen, Vfeces, Vstomach, dap_lumen, dap_ext, dap_feces)
  // Model for dapagliflozin absorption in the small intestine
  // Model for dapagliflozin absorption
  // absorption dapagliflozin (dap)
  // fraction absorbed: 0.84 (16% in feces) [Callegari2021]
  // enterohepatische circulation (minimal) -> not modeled
  // slower absorption when fed (compared to fasted) [Kasichayanula2011b] -> via absorption rate depending on food => absorption dap, no enterohepatic circulation
  // The content of this model has been carefully created in a manual research effort.
  // Terms of use
  // Copyright © 2025 Matthias König.
  // This work is licensed under a Creative Commons Attribution 4.0 International License.
  // Redistribution and use of any part of this model, with or without modification, are permitted provided that the following conditions are met:
  // Redistributions of this SBML file must retain the above copyright notice, this list of conditions and the following disclaimer.
  // Redistributions in a different form must reproduce the above copyright notice, this list of conditions and the following disclaimer in the documentation and/or other materials provided with the distribution.
  // This model is distributed in the hope that it will be useful, but WITHOUT ANY WARRANTY; without even the implied warranty of MERCHANTABILITY or FITNESS FOR A PARTICULAR PURPOSE.
  // occursIn FMA:45615 BTO:0000545 ncit:C12736 FMA:7199 BTO:0000648
  // hasProperty ncit:C79369 ncit:C79372 mamo:MAMO_0000046 ncit:C78126 ncit:C98083 ncit:C15299
  // hasTaxon taxonomy:9606 snomedct:337915000
  // isDescribedBy doi:10.5281/zenodo.13987865
  // model units - substance: mmole, time: min, volume: litre, area: m2, length: metre, extent: mmole

  // Compartments:
  compartment Vext = 1 litre; Vext is "plasma";  // SBO:0000290 ncit:C13356 BTO:0000131
  compartment Vgu = 1.2825 litre; Vgu is "intestine";  // SBO:0000290 FMA:45615 BTO:0000545 ncit:C12736
  compartment Vlumen = 1.15425 litre; Vlumen is "intestinal lumen (inner part of intestine)";  // SBO:0000290 FMA:14586 UBERON:0018543
  compartment Vfeces = 1 litre;  // SBO:0000290 FMA:64183 ncit:C13234 BTO:0000440
  compartment Ventero = 1 litre; Ventero is "intestinal lining (enterocytes)";  // SBO:0000290
  compartment Vapical = NaN; Vapical has m2; Vapical is "apical membrane (intestinal membrane enterocytes)";  // 2-D; SBO:0000290 FMA:84666 GO:0016324
  compartment Vbaso = NaN; Vbaso has m2; Vbaso is "basolateral membrane (intestinal membrane enterocytes)";  // 2-D; SBO:0000290 FMA:84669 GO:0016323
  compartment Vstomach = 1 litre;  // SBO:0000290 FMA:7148 ncit:C12391 UBERON:0000945

  // Species:
  substanceOnly species $dap_stomach in Vstomach = 0; dap_stomach is "dapagliflozin (stomach)";  // SBO:0000247 CHEBI:85078 ncit:C78126
  species dap_lumen in Vlumen = 0; dap_lumen is "dapagliflozin (intestinal volume)";  // SBO:0000247 CHEBI:85078 ncit:C78126
  species dap_ext in Vext = 0; dap_ext is "dapagliflozin (plasma)";  // SBO:0000247 CHEBI:85078 ncit:C78126
  substanceOnly species dap_feces in Vfeces = 0; dap_feces is "dapagliflozin (feces)";  // SBO:0000247 CHEBI:85078 ncit:C78126

  // Parameters:
  // Fraction absorbed, i.e., only a fraction of the dapagliflozin in the intestinal lumen is absorbed. This parameter determines how much of the dapagliflozin is excreted.
  // F_dap_abs of dose is absorbed. (1-F_dap_abs) is excreted in feces.
  // ~16 % in feces
  F_dap_abs = 0.84 dimensionless; F_dap_abs is "fraction absorbed dapagliflozin";  // SBO:0000002
  DAPABS_k = 0.05946482 per_min; DAPABS_k is "rate of dapagliflozin absorption";  // SBO:0000009
  // 1.0: normal absorption corresponding to tablet under fasting conditions.
  // food decreases the absorption rate, i.e. < 1.0.
  f_absorption = 1 dimensionless; f_absorption is "scaling factor for absorption rate";  // SBO:0000009
  PODOSE_dap = 0 mg; PODOSE_dap is "oral dose dapagliflozin [mg]";  // SBO:0000002
  Ka_dis_dap = 0.8484201 per_hr; Ka_dis_dap is "Ka_dis [1/hr] dissolution dapagliflozin";  // SBO:0000002
  Mr_dap = 408.873 g_per_mole; Mr_dap is "Molecular weight dapagliflozin [g/mole]";  // SBO:0000647
  absorption has mmole_per_min; absorption is "absorption dapagliflozin";

  // Assignment rules:
  absorption := f_absorption*DAPABS_k*Vgu*dap_lumen;

  // Rate rules:
  PODOSE_dap' = -dissolution_dap*Mr_dap;

  // Reactions:
  DAPABS: dap_lumen => dap_ext; F_dap_abs*absorption; DAPABS is "absorption dapagliflozin";  // SBO:0000655
  DAPEXC: dap_lumen => dap_feces; (1 - F_dap_abs)*absorption; DAPEXC is "excretion dapagliflozin (feces)";  // SBO:0000655
  // Swallowing, dissolution of tablet, and transport into intestine. Overall process describing the rates of this processes.
  dissolution_dap: $dap_stomach => dap_lumen; Ka_dis_dap/(60 min_per_hr)*PODOSE_dap/Mr_dap; dissolution_dap is "dissolution dapagliflozin";

  // Unit definitions:
  unit g_per_mole = gram / mole; g_per_mole is "g/mole";
  unit l_per_min = litre / (60 second); l_per_min is "l/min";
  unit m2 = metre^2; m2 is "meter^2";
  unit mM = 1e-3 mole / litre; mM is "mmole/liter";
  unit mg = 1e-3 gram;
  unit mg_per_min = 1e-3 gram / (60 second); mg_per_min is "mg/min";
  unit mg_per_s_l = 1e-3 gram / (second * litre); mg_per_s_l is "mg/s/l";
  unit min = 60 second;
  unit min_per_hr = 60 second / (3600 second); min_per_hr is "min/hour";
  unit mmole = 1e-3 mole;
  unit mmole_per_min = 1e-3 mole / (60 second); mmole_per_min is "mmole/min";
  unit mmole_per_min_l = 1e-3 mole / (60 second * litre); mmole_per_min_l is "mmole/min/l";
  unit per_hr = 1 / (3600 second); per_hr is "1/hr";
  unit per_min = 1 / (60 second); per_min is "1/min";
  unit per_mmole = 1 / (1e-3 mole); per_mmole is "1/mmole";
end
