// SBML level 3 version 2
// Created with https://github.com/matthiaskoenig/sbmlutils.

model dapagliflozin_liver(DAP2D3G_Vmax, DAP2D3G_Km_dap, f_ugt1a9, Vext, Vli, dap_ext, d3g_ext)
  // Model for hepatic dapagliflozin metabolism.
  // Model for dapagliflozin metabolism.
  // UGT1A9: 90% [Callegari2021]; 79.9% [Jo2021]
  // UGT2B4/2B7: 10% [Callegari2021]; 8.9% [Jo2021]
  // CYP3A4: 9.8% [Jo2021]
  // in hepatic impairment: increase in AUC & Cmax of dap and d3g [Kasichayanula2011] => only conversion dap -> d3g [UGT1A9], no d2g in first version; only UGT1A9 included
  // The content of this model has been carefully created in a manual research effort.
  // Terms of use
  // Copyright © 2026 Matthias König.
  // This work is licensed under a Creative Commons Attribution 4.0 International License.
  // Redistribution and use of any part of this model, with or without modification, are permitted provided that the following conditions are met:
  // Redistributions of this SBML file must retain the above copyright notice, this list of conditions and the following disclaimer.
  // Redistributions in a different form must reproduce the above copyright notice, this list of conditions and the following disclaimer in the documentation and/or other materials provided with the distribution.
  // This model is distributed in the hope that it will be useful, but WITHOUT ANY WARRANTY; without even the implied warranty of MERCHANTABILITY or FITNESS FOR A PARTICULAR PURPOSE.
  // hasTaxon taxonomy:9606 snomedct:337915000
  // hasProperty mamo:MAMO_0000046 ncit:C78126 ncit:C98083 ncit:C15299 ncit:C2985 ncit:C99532
  // isDescribedBy doi:10.3390/pharmaceutics18030287 doi:10.5281/10.36903/physiome.31368556 doi:10.5281/zenodo.13987865
  // occursIn FMA:7197 BTO:0000759 ncit:C12392
  // model units - substance: mmole, time: min, volume: litre, area: m2, length: metre, extent: mmole

  // Compartments:
  compartment Vext = 1.5 litre; Vext is "plasma";  // SBO:0000290 ncit:C13356 BTO:0000131
  compartment Vli = 1.5 litre; Vli is "liver";  // SBO:0000290 FMA:7197 BTO:0000759 ncit:C12392
  compartment Vmem = NaN; Vmem has m2; Vmem is "plasma membrane";  // 2-D; SBO:0000290 ncit:C13735 FMA:63841 GO:0005886

  // Species:
  species dap_ext in Vext = 0; dap_ext is "dapagliflozin (plasma)";  // SBO:0000247 CHEBI:85078 ncit:C78126
  species d3g_ext in Vext = 0; d3g_ext is "dapagliflozin-3-o-glucuronide (plasma)";  // SBO:0000247 pubchem.compound:91617971 inchikey:ZYZULHSUKTZGTR-PTNNFGGUSA-N
  species dap in Vli = 0; dap is "dapagliflozin (liver)";  // SBO:0000247 CHEBI:85078 ncit:C78126
  species d3g in Vli = 0; d3g is "dapagliflozin-3-o-glucuronide (liver)";  // SBO:0000247 pubchem.compound:91617971 inchikey:ZYZULHSUKTZGTR-PTNNFGGUSA-N

  // Parameters:
  DAP2D3G_Vmax = 0.04 mmole_per_min_l; DAP2D3G_Vmax is "Vmax dapagliflozin conversion";  // SBO:0000186
  // Km apparent in kidney microsomes for dapagliflozin; 479 µM [Kasichaynula2013] Ki for UGT1A9 with other substrates 12-15 µM [Obermeier2010a].
  DAP2D3G_Km_dap = 0.479 mM; DAP2D3G_Km_dap is "Km dapagliflozin UGT1A9";  // SBO:0000027
  // Scaling factor to vary UGT1A9 activity. 1.0: unchanged activity; < 1.0 decreased activity; >1.0 increased activity.
  f_ugt1a9 = 1 dimensionless; f_ugt1a9 is "scaling factor UGT1A9 activity";  // SBO:0000002
  DAPIM_Vmax = 10 mmole_per_min_l; DAPIM_Vmax is "Vmax dapagliflozin import";  // SBO:0000186
  // Possibly catalyzed by OAT3 with Ki=33µM. [FDA]
  DAPIM_Km_dap = 0.033 mM; DAPIM_Km_dap is "Vmax dapagliflozin import";  // SBO:0000027
  D3GEX_Vmax = 10 mmole_per_min_l; D3GEX_Vmax is "Vmax dapagliflozinat export";  // SBO:0000186
  // Substrate of hOAT3 and its Km value for hOAT3-mediated uptake was 115µM [FDA].
  D3GEX_Km_d3g = 0.115 mM; D3GEX_Km_d3g is "Vmax dapagliflozinat export";  // SBO:0000027

  // Reactions:
  // Possibly catalyzed by OAT3 with Ki=33µM. [FDA]
  DAPIM: dap_ext -> dap; DAPIM_Vmax/DAPIM_Km_dap*Vli*(dap_ext - dap)/(1 + dap_ext/DAPIM_Km_dap + dap/DAPIM_Km_dap); DAPIM is "dapagliflozin import (DAPIM, OAT3)";  // SBO:0000655
  DAP2D3G: dap => d3g; f_ugt1a9*DAP2D3G_Vmax*Vli*dap/(dap + DAP2D3G_Km_dap); DAP2D3G is "dapagliflozin conversion (DAP2D3G) UGT1A9";  // SBO:0000176 uniprot:O60656
  // Possibly catalyzed by OAT3 with Km=115µM. [FDA]
  D3GEX: d3g -> d3g_ext; D3GEX_Vmax/D3GEX_Km_d3g*Vli*(d3g - d3g_ext)/(1 + d3g/D3GEX_Km_d3g + d3g_ext/D3GEX_Km_d3g); D3GEX is "dapagliflozin-3-o-glucuronide export (D3GEX)";  // SBO:0000655

  // Unit definitions:
  unit g_per_mole = gram / mole; g_per_mole is "g/mole";
  unit l_per_min = litre / (60 second); l_per_min is "l/min";
  unit m2 = metre^2; m2 is "meter^2";
  unit mM = 1e-3 mole / litre; mM is "mmole/liter";
  unit mg = 1e-3 gram;
  unit mg_per_s_l = 1e-3 gram / (second * litre); mg_per_s_l is "mg/s/l";
  unit min = 60 second;
  unit min_per_hr = 60 second / (3600 second); min_per_hr is "min/hour";
  unit mmole = 1e-3 mole;
  unit mmole_per_min = 1e-3 mole / (60 second); mmole_per_min is "mmole/min";
  unit mmole_per_min_l = 1e-3 mole / (60 second * litre); mmole_per_min_l is "mmole/min/l";
  unit per_min = 1 / (60 second); per_min is "1/min";
  unit per_mmole = 1 / (1e-3 mole); per_mmole is "1/mmole";
end
